<Lems>

        <!-- Example showing Spike Timing Dependent Plasticity synapse -->

  <!---       NOTE: EXAMPLE NOT YET WORKING!!!!   -->

        <!-- This is a file which can be read and executed by the LEMS Interpreter.
             It imports the LEMS definitions of the core NeuroML 2 Components, creates
             a model in "pure" NeuroML 2 and contains some LEMS elements for running
             a simulation -->

        <Target component="sim1"/>

        <Include file="NeuroMLCoreDimensions.xml"/>
        <Include file="Cells.xml"/>
        <Include file="Networks.xml"/>
        <Include file="Simulation.xml"/>

    <!-- NeuroML 2 elements... -->

        <iafCell id="iaf1" leakReversal="-50mV" thresh="-55mV" reset="-70mV" C="1e-5uF" leakConductance="5e-7mS"/>
        <iafCell id="iaf2" leakReversal="-50mV" thresh="-55mV" reset="-70mV" C="1e-5uF" leakConductance="5.2e-7mS"/>

  <!---       NOTE: EXAMPLE NOT YET WORKING!!!!   -->

        <stdpSynapse id="stdpSyn" gbase="0.1nS" erev="0mV" tauRise="0.1ms" tauDecay="2ms">
        </stdpSynapse>

        <network id="net2">
            <population id="src" component="iaf1" size="1"/>
            <population id="tgt" component="iaf2" size="1"/>
            <synapticConnection from="src[0]" to="tgt[0]" synapse="stdpSyn" destination="synapses"/>
        </network>

   <!-- End of NeuroML 2 elements... -->

    <!-- <SimulationSet id="sim1">
        <Display id="disp1" title="NOT YET WORKING!! Ex11: Cells with STDP synapse: voltage" xmin="0" xmax="300" ymin="-75" ymax="-50"/>

        <Simulation id="sim1" length="300ms" step="0.01ms" target="net2" display="disp1">

            <DisplayList timeScale="1ms" title="NOT YET WORKING!! Ex11: Cells with STDP synapse: voltage">
                <Line id="l1" quantity="src[0]/v" scale="1mV"  color="#000000" timeScale="1ms"/>
                <Line id="l2" quantity="tgt[0]/v" scale="1mV"  color="#0000FF" timeScale="1ms"/>
            </DisplayList>

        </Simulation>
    </SimulationSet>-->

       <Simulation id="sim1" length="300ms" step="0.01ms" target="net2">
                <Display id="d1" title="NOT YET WORKING!! Ex11: Cells with STDP synapse: voltage" timeScale="1ms" xmin="0" xmax="300" ymin="-75" ymax="-50">
                        <Line id="l0" quantity="src[0]/v" scale="1mV" color="#000000" timeScale="1ms"/>
                        <Line id="l1" quantity="tgt[0]/v" scale="1mV" color="#0000FF" timeScale="1ms"/>
                </Display>

                <Display id="d2" title="NOT YET WORKING!! Ex11: Cells with STDP synapse: synaptic conductances" timeScale="1ms" xmin="0" xmax="300" ymin="-0.01" ymax="0.11">
                        <Line id ="l1" quantity="tgt[0]/stdpSyn/g" scale="1nS"  color="#000000" timeScale="1ms"/>
                </Display>

        </Simulation>

</Lems>
