<Lems>

        <!-- Example with various input currents/spike sources -->

        <!-- This is a file which can be read and executed by the LEMS Interpreter.
             It imports the LEMS definitions of the core NeuroML 2 Components, creates
             a model in "pure" NeuroML 2 and contains some LEMS elements for running
             a simulation -->

<!-- Specify which component to run -->
<Target component="sim1" reportFile="report.ex16.txt"/>

<!-- Include core NeuroML2 ComponentType definitions -->
<Include file="Cells.xml"/>
<Include file="Networks.xml"/>
<Include file="Inputs.xml"/>
<Include file="Simulation.xml"/>

<izhikevich2007Cell id="RS" v0 = "-60mV" C="100 pF" k = "0.7 nS_per_mV"
                        vr = "-60 mV" vt = "-40 mV" vpeak = "35 mV"
                        a = "0.03 per_ms" b = "-2 nS" c = "-50 mV" d = "100 pA"/>

<expTwoSynapse id="syn1" gbase="1nS" erev="20mV" tauRise="0.1ms" tauDecay="3ms"/>

<!-- Including file with a <neuroml> root, a "real" NeuroML 2 file -->
<Include file="../examples/NML2_Inputs.nml"/>

<network id="net1">
    <population id="izhPop" component="RS" size="13"/>

    <population id="spikeArrPop" component="spkArr" size="1"/>
    <population id="spikeGenRegularPop" component="spikeGenRegular" size="1"/>
    <population id="spikeGenPoissonPop" component="spikeGenPoisson" size="1"/>
    <population id="spikeGenRefPoissonPop" component="spikeGenRefPoisson" size="1"/>
    <population id="spikeGenRandomPop" component="spikeGenRandom" size="1"/>

    <explicitInput target="izhPop[0]" input="pulseGen0" destination="synapses"/>
    <explicitInput target="izhPop[1]" input="sg0" destination="synapses"/>
    <explicitInput target="izhPop[2]" input="rg0" destination="synapses"/>
    <explicitInput target="izhPop[3]" input="vClamp0" destination="synapses"/>

    <explicitInput target="izhPop[8]" input="poissonFiringSyn" destination="synapses"/>
    <explicitInput target="izhPop[9]" input="ci0" destination="synapses"/>
    <explicitInput target="izhPop[10]" input="transPoissonFiringSyn" destination="synapses"/>
    <explicitInput target="izhPop[11]" input="synTrain" destination="synapses"/>

    <synapticConnection from="spikeArrPop[0]" to="izhPop[4]" synapse="syn1" destination="synapses"/>
    <synapticConnection from="spikeGenRegularPop[0]" to="izhPop[5]" synapse="syn1" destination="synapses"/>
    <synapticConnection from="spikeGenRandomPop[0]" to="izhPop[6]" synapse="syn1" destination="synapses"/>
    <synapticConnection from="spikeGenPoissonPop[0]" to="izhPop[7]" synapse="syn1" destination="synapses"/>
    <synapticConnection from="spikeGenRefPoissonPop[0]" to="izhPop[12]" synapse="syn1" destination="synapses"/>
</network>

        <!-- End of NeuroML2 content -->

<Simulation id="sim1" length="300ms" step="0.001ms" target="net1" seed="123"> <!-- Note seed: ensures same random numbers used every run -->

    <Display id="d0" title="Ex16: Izhikevich cell, current clamp input" timeScale="1ms" xmin="-20" xmax="320" ymin="-80" ymax="45">
        <Line id ="izh0 v (mV)" quantity="izhPop[0]/v" scale="1mV"  color="#ee40FF" timeScale="1ms"/>
        <Line id ="current clamp i (nA)" quantity="izhPop[0]/pulseGen0/i" scale="1nA"  color="#333333" timeScale="1ms"/>
    </Display>

   <Display id="d1" title="Ex16: Izhikevich cell, sine wave input" timeScale="1ms" xmin="-20" xmax="320" ymin="-120" ymax="45">
        <Line id ="izh1 v (mV)" quantity="izhPop[1]/v" scale="1mV"  color="#ee40FF" timeScale="1ms"/>
        <Line id ="sine wave i (nA)" quantity="izhPop[1]/sg0/i" scale="1nA"  color="#333333" timeScale="1ms"/>
    </Display>

    <Display id="d2" title="Ex16: Izhikevich cell, ramp current input" timeScale="1ms" xmin="-20" xmax="320" ymin="-110" ymax="45">
        <Line id ="izh2 v (mV)" quantity="izhPop[2]/v" scale="1mV"  color="#ee40FF" timeScale="1ms"/>
        <Line id ="ramp current i (nA)" quantity="izhPop[2]/rg0/i" scale="1nA"  color="#333333" timeScale="1ms"/>
    </Display>

    <Display id="d3" title="Ex16: Izhikevich cell, voltage clamp" timeScale="1ms" xmin="-20" xmax="320" ymin="-70" ymax="120">
        <Line id ="izh3 v (mV)" quantity="izhPop[3]/v" scale="1mV"  color="#ee40FF" timeScale="1ms"/>
        <Line id ="voltage clamp i (pA)" quantity="izhPop[3]/vClamp0/i" scale="1pA"  color="#333333" timeScale="1ms"/>
    </Display>

    <Display id="dx" title="Ex16: Izhikevich cell, compound input" timeScale="1ms" xmin="-20" xmax="320" ymin="-70" ymax="120">
        <Line id ="izh3 v (mV)" quantity="izhPop[9]/v" scale="1mV"  color="#ee40FF" timeScale="1ms"/>
        <Line id ="compound clamp i (nA)" quantity="izhPop[9]/ci0/i" scale="1nA"  color="#333333" timeScale="1ms"/>
    </Display>

    <Display id="d40" title="Ex16: Izhikevich cell, spiking inputs, time since spikes" timeScale="1ms" xmin="-20" xmax="320" ymin="-5" ymax="45">
        <Line id ="regular spike gen t since" quantity="spikeGenRegularPop[0]/tsince" scale="1ms"  color="#3fffaa" timeScale="1ms"/>
        <Line id ="poisson spike gen t since" quantity="spikeGenPoissonPop[0]/tsince" scale="1ms"  color="#3ff9999" timeScale="1ms"/>
        <Line id ="poisson ref. spike gen t since" quantity="spikeGenRefPoissonPop[0]/tsince" scale="1ms"  color="#3ff1119" timeScale="1ms"/>
        <Line id ="random spike t since" quantity="spikeGenRandomPop[0]/tsince" scale="1ms"  color="#aaf9999" timeScale="1ms"/>

        <Line id ="spike array t since" quantity="spikeArrPop[0]/tsince" scale="1ms"  color="#3faa99" timeScale="1ms"/>
        <Line id ="Transient poisson spike gen" quantity="izhPop[10]/transPoissonFiringSyn/tsince" scale="1ms"  color="#000000" timeScale="1ms"/>
    </Display>

    <Display id="d4" title="Ex16: Izhikevich cell, spiking inputs" timeScale="1ms" xmin="-20" xmax="320" ymin="-61" ymax="-56">
      <Line id="spike array" quantity="izhPop[4]/v" scale="1mV"
	    color="#DBA901" timeScale="1ms"/>
      <Line id="regular spike gen" quantity="izhPop[5]/v" scale="1mV"
	    color="#80FF00" timeScale="1ms"/>
      <Line id="random (uniform) spike gen" quantity="izhPop[6]/v" scale="1mV"
	    color="#01A9DB" timeScale="1ms"/>
      <Line id="poisson spike gen" quantity="izhPop[7]/v" scale="1mV"
	    color="#8000FF" timeScale="1ms"/>
      <Line id="poisson ref. spike gen" quantity="izhPop[12]/v" scale="1mV"
	    color="#80aaaF" timeScale="1ms"/>
      <Line id="transient poisson spike gen" quantity="izhPop[10]/v" scale="1mV"
	    color="#ff00FF" timeScale="1ms"/>
    </Display>

    <Display id="d5" title="Ex16: Izhikevich cell, poison firing synapse" timeScale="1ms" xmin="-20" xmax="320" ymin="-80" ymax="45">
        <Line id ="izh8 v (mV)" quantity="izhPop[8]/v" scale="1mV"  color="#ee40FF" timeScale="1ms"/>
        <Line id ="poison firing synapse g" quantity="izhPop[8]/poissonFiringSyn/synInput/g" scale="1nS"  color="#eeeeee" timeScale="1ms"/>
        <Line id ="poison firing synapse i" quantity="izhPop[8]/poissonFiringSyn/i" scale="0.1nA"  color="#333333" timeScale="1ms"/>
        <Line id ="poison firing synapse time since" quantity="izhPop[8]/poissonFiringSyn/tsince" scale="1ms"  color="#3fffaa" timeScale="1ms"/>
    </Display>

    <!--<Display id="d6" title="Ex16: Izhikevich cell, compound input" timeScale="1ms" xmin="-20" xmax="320" ymin="-110" ymax="45">
        <Line id ="izh9 v (mV)" quantity="izhPop[9]/v" scale="1mV"  color="#ee40FF" timeScale="1ms"/>
        <Line id ="compound i (nA)" quantity="izhPop[9]/ci0/i" scale="1nA"  color="#333333" timeScale="1ms"/>
    </Display>-->

    <!-- <OutputFile id="of1" fileName="results/ex16_g.dat">
        <OutputColumn id="syn1exp_g" quantity="izhPop[8]/poissonFiringSyn/synInput/g" />
    </OutputFile>-->

    <OutputFile id="of0" fileName="results/ex16_v.dat">
        <OutputColumn id="v0" quantity="izhPop[0]/v" />
        <OutputColumn id="v1" quantity="izhPop[1]/v" />
        <OutputColumn id="v2" quantity="izhPop[2]/v" />
        <OutputColumn id="v3" quantity="izhPop[3]/v" />
        <OutputColumn id="v4" quantity="izhPop[4]/v" />
        <OutputColumn id="v5" quantity="izhPop[5]/v" />
        <OutputColumn id="v6" quantity="izhPop[6]/v" />
        <OutputColumn id="v7" quantity="izhPop[7]/v" />
        <OutputColumn id="v8" quantity="izhPop[8]/v" />
        <OutputColumn id="v9" quantity="izhPop[9]/v" />
    </OutputFile>

</Simulation>

</Lems>
