<Lems>

    <Target component="sim1" />

    <Include file="Cells.xml" />
    <Include file="Networks.xml" />
    <Include file="Simulation.xml" />

    <!-- Main NeuroML2 content. -->

    <!-- Including file with a <neuroml> root, a "real" NeuroML 2 file -->
    <Include file="../examples/NML2_AnalogSynapses.nml"/>

    <!-- End of NeuroML2 content -->

    <Simulation id="sim1" length="1000ms" step="0.05ms" target="net1">

        <Display id="d0" title="Ex20: AnalogSynapses in LEMS" timeScale="1ms" xmin="-50"  xmax="1050" ymin="-75" ymax="-50">
            <Line id="iafCell1 v" quantity="iafPop1[0]/v" scale="1mV" color="#FF0000" timeScale="1ms" />
            <Line id="iafCell2 v" quantity="iafPop2[0]/v" scale="1mV" color="#FFFF00" timeScale="1ms" />
            <Line id="iafCell3 v" quantity="iafPop3[0]/v" scale="1mV" color="#FFFFFF" timeScale="1ms" />
        </Display>

        <Display id="d1" title="Ex20: AnalogSynapses in LEMS: currents" timeScale="1ms" xmin="-50"  xmax="1050" ymin="-0.01" ymax="0.15">
            <Line id="i linear" quantity="iafPop2[0]/gs1/i" scale="1pA" color="#FF0000" timeScale="1ms" />
            <Line id="i linear pre" quantity="iafPop1[0]/silent1/i" scale="1pA" color="#222222" timeScale="1ms" />

            <Line id="i graded" quantity="iafPop3[0]/gs2/i" scale="1pA" color="#FFFF00" timeScale="1ms" />
            <Line id="i graded pre" quantity="iafPop1[0]/silent2/i" scale="1pA" color="#555555" timeScale="1ms" />
        </Display>

        <Display id="d3" title="Ex20: AnalogSynapses in LEMS: gradedSyn s" timeScale="1ms" xmin="-50"  xmax="1050" ymin="-0.1" ymax="1.1">
            <Line id="s" quantity="iafPop3[0]/gs2/s" scale="1" color="#FF0000" timeScale="1ms" />
            <Line id="s inf" quantity="iafPop3[0]/gs2/inf" scale="1" color="#FFFF00" timeScale="1ms" />
        </Display>

        <Display id="d4" title="Ex20: AnalogSynapses in LEMS: gradedSyn tau" timeScale="1ms" xmin="-50"  xmax="1050" ymin="0.01" ymax="0.04">
            <Line id="s tau" quantity="iafPop3[0]/gs2/tau" scale="1" color="#FF0000" timeScale="1ms" />
        </Display>

        <OutputFile id="of0" fileName="results/ex20_v.dat">
            <OutputColumn id="iafCell1" quantity="iafPop1[0]/v" />
            <OutputColumn id="iafCell2" quantity="iafPop2[0]/v" />
            <OutputColumn id="iafCell3" quantity="iafPop3[0]/v" />
        </OutputFile>

    </Simulation>

</Lems>
