<Lems>

    <!-- Network connection between HH cells -->

    <!-- This is a file which can be read and executed by the LEMS Interpreter.
         It imports the LEMS definitions of the core NeuroML 2 Components, creates
         a model in "pure" NeuroML 2 and contains some LEMS elements for running
         a simulation -->

    <!-- Specify which component to run -->
    <Target component="sim1"/>

    <!-- Include core NeuroML2 ComponentType definitions -->
    <Include file="Cells.xml"/>
    <Include file="Networks.xml"/>
    <Include file="Simulation.xml"/>

            <!-- Main NeuroML2 content -->

    <ionChannelPassive id="passive" conductance="10pS"/>

    <ionChannelHH id="na" conductance="10pS">

       <gateHHrates id="m" instances="3">
            <forwardRate type="HHExpLinearRate" rate="1per_ms" midpoint="-40mV" scale="10mV"/>
            <reverseRate type="HHExpRate" rate="4per_ms" midpoint="-65mV" scale="-18mV"/>
       </gateHHrates>

       <gateHHrates id="h" instances="1">
           <forwardRate type="HHExpRate" rate="0.07per_ms" midpoint="-65mV" scale="-20mV"/>
           <reverseRate type="HHSigmoidRate" rate="1per_ms" midpoint="-35mV" scale="10mV"/>
       </gateHHrates>

    </ionChannelHH>

    <ionChannelHH id="k" conductance="10pS">
        <gateHHrates id="n" instances="4">
            <forwardRate type="HHExpLinearRate" rate="0.1per_ms" midpoint="-55mV" scale="10mV"/>
            <reverseRate type="HHExpRate" rate="0.125per_ms" midpoint="-65mV" scale="-80mV"/>
        </gateHHrates>
    </ionChannelHH>

    <pointCellCondBased id="hhcell_1" C="10pF"  v0="-65mV" thresh="20mV">

        <!-- Note: while pointCellCondBased is the simplest way to represent a cell with
             HH/passive conductances, it is highly recommended to use the <cell> element as in
             examples/NML2_SingleCompHHCell.nml with an explicit description of the
             compartment (proximal/distal info for the segment). This will ensure maximal
             compatibility with simuators and visualisation/analysis applications -->
        <channelPopulation id="leak" ionChannel="passive" number="300" erev="-54.3mV"/>
        <channelPopulation id="naChans" ionChannel="na" number="120000" erev="50mV"/>
        <channelPopulation id="kChans" ionChannel="k" number="36000" erev="-77mV"/>

    </pointCellCondBased>

    <pointCellCondBased id="hhcell_2" C="10pF"  v0="-55mV" thresh="20mV">

        <channelPopulation id="leak" ionChannel="passive" number="300" erev="-54.3mV"/>

    </pointCellCondBased>

    <pulseGenerator id="pulseGen1" delay="25ms" duration="50ms" amplitude="0.065 nA" />

    <expOneSynapse id="syn1exp" gbase="0.5nS" erev="0mV" tauDecay="3ms" />

    <expTwoSynapse id="syn2exp" gbase="0.5nS" erev="0mV" tauRise="1ms" tauDecay="2ms" />

    <alphaSynapse id="synalpha" gbase="0.5nS" erev="0mV" tau="2ms" />

            <!-- End of NeuroML2 content -->

    <!-- This is LEMS specific... -->

    <network id="net1">
        <population id="hh1pop" component="hhcell_1" size="1"/>
        <population id="hh2pop" component="hhcell_2" size="3"/>

        <!-- NOTE: Only explicit connections allowed at the moment!
             Templates for connectivity patterns are being worked on... -->
        <synapticConnection from="hh1pop[0]" to="hh2pop[0]" synapse="syn1exp" destination="synapses"/>
        <synapticConnection from="hh1pop[0]" to="hh2pop[1]" synapse="syn2exp" destination="synapses"/>
        <synapticConnection from="hh1pop[0]" to="hh2pop[2]" synapse="synalpha" destination="synapses"/>

        <explicitInput target="hh1pop[0]" input="pulseGen1" destination="synapses"/>

    </network>

    <Simulation id="sim1" length="100ms" step="0.005ms" target="net1">

        <Display id="d1" title="Ex3: Network connection between HH cells: voltage traces" timeScale="1ms" xmin="0" xmax="100" ymin="-90" ymax="60">
            <Line id ="Pre cell v" quantity="hh1pop[0]/v" scale="1mV"  color="#ee40FF" timeScale="1ms"/>
            <Line id ="Exp1 cell v" quantity="hh2pop[0]/v" scale="1mV"  color="#1111FF" timeScale="1ms"/>
            <Line id ="Exp2 cell v" quantity="hh2pop[1]/v" scale="1mV"  color="#aaaaFF" timeScale="1ms"/>
            <Line id ="Alpha cell v" quantity="hh2pop[2]/v" scale="1mV"  color="#aaFFFF" timeScale="1ms"/>
        </Display>

        <Display id="d2" title="Ex3: Network connection between HH cells: synaptic conductance" timeScale="1ms" xmin="0" xmax="100" ymin="-0.05" ymax="0.6">
            <Line id ="Cond exp1" quantity="hh2pop[0]/syn1exp/g" scale="1nS"  color="#1111FF" timeScale="1ms"/>
            <Line id ="Cond exp2" quantity="hh2pop[1]/syn2exp/g" scale="1nS"  color="#aaaaFF" timeScale="1ms"/>
            <Line id ="Cond alpha" quantity="hh2pop[2]/synalpha/g" scale="1nS"  color="#aaFFFF" timeScale="1ms"/>
        </Display>

        <OutputFile id="of0" fileName="results/ex3_v.dat">
            <OutputColumn id="syn1exp_g" quantity="hh2pop[0]/v" />
            <OutputColumn id="syn2exp_g" quantity="hh2pop[1]/v" />
            <OutputColumn id="synalpha_g" quantity="hh2pop[2]/v" />
        </OutputFile>

    </Simulation>

</Lems>
