<Lems>

    <!-- Example showing cell with kinetic scheme based channel  -->

    <!-- This is a file which can be read and executed by the LEMS Interpreter.
         It imports the LEMS definitions of the core NeuroML 2 Components, creates
         a model in "pure" NeuroML 2 and contains some LEMS elements for running
         a simulation -->

    <!-- Specify which component to run -->
    <Target component="sim1"/>

    <!-- Include core NeuroML2 ComponentType definitions -->
    <Include file="Cells.xml"/>
    <Include file="Networks.xml"/>
    <Include file="Simulation.xml"/>

            <!-- Main NeuroML2 content -->

    <ionChannelKS id="k_vh" conductance="8pS">
        <gateKS id="n" instances="1">
            <closedState id="c1"/>
            <openState id="o1"/>
            <vHalfTransition from="c1" to="o1" vHalf = "0mV" z="1.5" gamma="0.75" tau="3.2ms" tauMin="0.3ms"/>
        </gateKS>
    </ionChannelKS>

    <!-- This channel is not fully tested yet! -->
    <ionChannelKS id="k_fr"  conductance="1pS">
        <gateKS id="n" instances="1">
            <closedState id="c1"/>
            <openState id="o1"/>

            <forwardTransition id="ft" from="c1" to="o1" >
                <rate id="r1" type="HHExpLinearRate" rate="0.1per_ms" midpoint="-55mV" scale="10mV"/>
            </forwardTransition>

            <reverseTransition id="rt" from="c1" to="o1" >
                <rate id="r1" type="HHExpRate" rate="0.125per_ms" midpoint="-65mV" scale="-80mV"/>
            </reverseTransition>
        </gateKS>
    </ionChannelKS>

    <ionChannelHH id="na" conductance="20pS">

       <gateHHrates id="m" instances="3">
            <forwardRate type="HHExpLinearRate" rate="1.per_ms" midpoint="-40mV" scale="10mV"/>
            <reverseRate type="HHExpRate" rate="4per_ms" midpoint="-65mV" scale="-18mV"/>
       </gateHHrates>

       <gateHHrates id="h" instances="1">
           <forwardRate type="HHExpRate" rate="0.07per_ms" midpoint="-65.mV" scale="-20.mV"/>
           <reverseRate type="HHSigmoidRate" rate="1per_ms" midpoint="-35mV" scale="10mV"/>
       </gateHHrates>

    </ionChannelHH>

    <ionChannelPassive id="passive" conductance="10pS"/>

    <cell id="hhcell_1" type="pointCellCondBased" C="1pF"  v0="-65mV" thresh="-20mV">

        <channelPopulation id="na_chans" ionChannel="na" number="6000" erev="50mV"/>
        <channelPopulation id="k_chans" ionChannel="k_vh" number="1800" erev="-77mV"/>

    </cell>

    <pulseGenerator id="pulseGen1" delay="100ms" duration="100ms" amplitude="0.005 nA"/>

    <network id="net1">
        <population id="hhpop" component="hhcell_1" size="1"/>

        <explicitInput target="hhpop[0]" input="pulseGen1" destination="synapses"/>

    </network>

            <!-- End of NeuroML2 content -->

    <Simulation id="sim1" length="300ms" step="0.01ms" target="net1">

        <Display title="Ex4: Kinetic scheme description for K+ channel: voltage" timeScale="1ms" xmin="-30" xmax="330" ymin="-90" ymax="60">
            <Line id="v" quantity="hhpop[0]/v" scale="1mV"  color="#ff4040" timeScale="1ms"/>
        </Display>

        <Display title="Ex4: Kinetic scheme description for K+ channel: channel variables" timeScale="1ms" xmin="-30" xmax="330" ymin="-0.1" ymax="1.1">
            <Line id="m" quantity="hhpop[0]/na_chans/na/m/q" scale="1"  color="#ff00ff" timeScale="1ms"/>
            <Line id="h" quantity="hhpop[0]/na_chans/na/h/q" scale="1"  color="#ffffff" timeScale="1ms"/>
            <Line id="n" quantity="hhpop[0]/k_chans/k_vh/n/q" scale="1"  color="#ffff00" timeScale="1ms"/>
        </Display>

        <Display title="Ex4: Kinetic scheme description for K+ channel: states of k" timeScale="1ms" xmin="-30" xmax="330" ymin="-0.1" ymax="1.1">
            <Line id="c1" quantity="hhpop[0]/k_chans/k_vh/n/c1/occupancy" scale="1"  color="#ffff00" timeScale="1ms"/>
            <Line id="o1" quantity="hhpop[0]/k_chans/k_vh/n/o1/occupancy" scale="1"  color="#ff0000" timeScale="1ms"/>
        </Display>

        <!-- See other examples for saving of data traces -->

    </Simulation>

</Lems>
