<Lems>

    <!-- Example showing NMDA synapse -->

    <!-- This is a file which can be read and executed by the LEMS Interpreter.
         It imports the LEMS definitions of the core NeuroML 2 Components, creates
         a model in "pure" NeuroML 2 and contains some LEMS elements for running
         a simulation -->

    <Target component="sim1"/>

    <Include file="Cells.xml"/>
    <Include file="Networks.xml"/>
    <Include file="Simulation.xml"/>

    <!-- Including file with a <neuroml> root, a "real" NeuroML 2 file -->
    <!-- Note: components defined in this can be reused, but we don't use the network here (net1) for simulation,
         We use the one defined below! -->
    <Include file="../examples/NML2_SingleCompHHCell.nml"/>

    <!-- NeuroML 2 elements... -->

    <spikeGenerator id="spikeGen55ms" period="75ms" />

    <baseCell id="passiveCell" type="pointCellCondBased" C="10pF"  v0="-55mV" thresh="20mV">
        <channelPopulation id="leak" ionChannel="passiveChan" number="300" erev="-54.3mV"/>
    </baseCell>

    <blockingSynapse id="nmmdaSyn1not_plastic" gbase="0.3nS" tauRise="3.4ms" tauDecay="44ms" erev="0mV">

    <blockMechanism type="voltageConcDepBlockMechanism" species="mg"
		      blockConcentration="1.0 mM"
		      scalingConc="0.5128 mM" scalingVolt="65.33 mV"/>

   </blockingSynapse>

    <pulseGenerator id="pulseGen2" delay="200ms" duration="10000ms" amplitude="0.065nA"/>

    <network id="net2">
        <population id="srcPop" component="spikeGen55ms" size="1"/>
        <population id="pasPop1" component="passiveCell" size="1"/>
        <population id="pasPop2" component="passiveCell" size="1"/>
        <synapticConnection from="srcPop[0]" to="pasPop1[0]"
			    synapse="nmdaSyn1not_plastic"
			    destination="synapses"/>
        <explicitInput target="pasPop1[0]" input="pulseGen2"
		       destination="synapses"/>
    </network>

    <!-- End of NeuroML 2 elements... -->

    <Simulation id="sim1" length="400ms" step="0.01ms" target="net2">

        <Display id="d1" title="Ex6: Cells with NMDA mediated synapse: voltage" timeScale="1ms" xmin="-20" xmax="420" ymin="-60" ymax="-25">
            <Line id="V" quantity="pasPop1[0]/v" scale="1mV"
		  color="#01DF01" timeScale="1ms"/>
        </Display>

        <Display id="d2" title="Ex6: Cells with NMDA mediated synapse: synaptic conductance" timeScale="1ms" xmin="-20" xmax="420" ymin="-0.02" ymax="0.1">
            <Line id ="g(nmdaSyn1)" quantity="pasPop1[0]/nmdaSyn1not_plastic/g" scale="1nS"
		  color="#01DF01" timeScale="1ms"/>
        </Display>

        <Display id="db" title="Ex6: Cells with NMDA mediated synapse: synaptic block factor" timeScale="1ms" xmin="-20" xmax="420" ymin="0" ymax="0.2">
            <Line id ="blockFactor(nmdaSyn1)"
		  quantity="pasPop1[0]/nmdaSyn1not_plastic/block/blockFactor"
		  scale="1"  color="#01DF01" timeScale="1ms"/>
        </Display>

        <Display id="d3" title="Ex6: Cells with NMDA mediated synapse: spike generator" timeScale="1ms" xmin="-20" xmax="420" ymin="-10" ymax="90">
            <Line id ="time since spike" quantity="srcPop[0]/tsince" scale="1ms"  color="#aaaaaa" timeScale="1ms"/>
        </Display>

        <OutputFile id="of0" fileName="results/ex6_v.dat">
            <OutputColumn id="v" quantity="pasPop1[0]/v"/>
        </OutputFile>

        <OutputFile id="of1" fileName="results/ex6_g.dat">
            <OutputColumn id ="g" quantity="pasPop1[0]/nmdaSyn1not_plastic/g"/>
        </OutputFile>

    </Simulation>

</Lems>
