<Lems>

        <!-- Example with Adaptive exponential integrate-and-fire model -->

        <!-- This is a file which can be read and executed by the LEMS Interpreter.
             It imports the LEMS definitions of the core NeuroML 2 Components, creates
             a model in "pure" NeuroML 2 and contains some LEMS elements for running
             a simulation -->

<!-- Specify which component to run -->
<Target component="sim1"/>

<!-- Include core NeuroML2 ComponentType definitions -->
<Include file="Cells.xml"/>
<Include file="Networks.xml"/>
<Include file="Simulation.xml"/>

        <!-- Main NeuroML2 content. http://www.scholarpedia.org/article/Adaptive_exponential_integrate-and-fire_model -->

<adExIaFCell id="adExBurst2"     C="281pF" gL="30nS" EL="-70.6mV" reset="-48.5mV" VT = "-50.4mV" thresh = "-40.4mV" delT="2mV" tauw="40ms"  a ="4nS"   b = "0.08nA" refract="0ms"/>

<adExIaFCell id="adExBurst4"     C="281pF" gL="30nS" EL="-70.6mV" reset="-47.2mV" VT = "-50.4mV" thresh = "-40.4mV" delT="2mV" tauw="40ms"  a ="4nS"   b = "0.08nA" refract="0ms"/>

<adExIaFCell id="adExBurstChaos" C="281pF" gL="30nS" EL="-70.6mV" reset="-48mV"   VT = "-50.4mV" thresh = "-40.4mV" delT="2mV" tauw="40ms"  a ="4nS"   b = "0.08nA" refract="0ms"/>

<adExIaFCell id="adExRebound"    C="281pF" gL="30nS" EL="-60mV"   reset="-51mV"   VT = "-54mV"   thresh = "-30mV"   delT="2mV" tauw="150ms" a ="200nS" b = "0.1nA"  refract="0ms"/>

<pulseGenerator id="pulseGen1" delay="0ms" duration="2000ms" amplitude="0.8nA" />
<pulseGenerator id="pulseGen2" delay="150ms" duration="50ms" amplitude="-0.5nA" />

<network id="net1">
    <population id="adExPop1" component="adExBurst2" size="1"/>
    <population id="adExPop2" component="adExBurst4" size="1"/>
    <population id="adExPop3" component="adExBurstChaos" size="1"/>
    <population id="adExPop4" component="adExRebound" size="1"/>

    <explicitInput target="adExPop1[0]" input="pulseGen1" destination="synapses"/>
    <explicitInput target="adExPop2[0]" input="pulseGen1" destination="synapses"/>
    <explicitInput target="adExPop3[0]" input="pulseGen1" destination="synapses"/>
    <explicitInput target="adExPop4[0]" input="pulseGen2" destination="synapses"/>
</network>

        <!-- End of NeuroML2 content -->

<Simulation id="sim1" length="300ms" step="0.025ms" target="net1">

    <Display id="d1" title="Ex8: Adaptive exponential cell: 2 spike burst" timeScale="1ms"  xmin="0" xmax="300" ymin="-90" ymax="50">
        <Line id ="adEx1" quantity="adExPop1[0]/v" scale="1mV"  color="#ee40FF" timeScale="1ms"/>
        <Line id ="adEx2" quantity="adExPop1[0]/w" scale="0.01nA"  color="#BBA0AA" timeScale="1ms"/>
    </Display>

    <Display id="d2" title="Ex8: Adaptive exponential cell: 4 spike burst" timeScale="1ms"  xmin="0" xmax="300" ymin="-90" ymax="50">
        <Line id ="adEx1" quantity="adExPop2[0]/v" scale="1mV"  color="#ee40FF" timeScale="1ms"/>
        <Line id ="adEx2" quantity="adExPop2[0]/w" scale="0.01nA"  color="#BBA0AA" timeScale="1ms"/>
    </Display>

    <Display id="d3" title="Ex8: Adaptive exponential cell: chaotic spiking" timeScale="1ms"  xmin="0" xmax="300" ymin="-90" ymax="50">
        <Line id ="adEx1" quantity="adExPop3[0]/v" scale="1mV"  color="#ee40FF" timeScale="1ms"/>
        <Line id ="adEx2" quantity="adExPop3[0]/w" scale="0.01nA"  color="#BBA0AA" timeScale="1ms"/>
    </Display>

    <Display id="d4" title="Ex8: Adaptive exponential cell: rebound burst" timeScale="1ms"  xmin="0" xmax="300" ymin="-90" ymax="50">
        <Line id ="adEx1" quantity="adExPop4[0]/v" scale="1mV"  color="#ee40FF" timeScale="1ms"/>
        <Line id ="adEx2" quantity="adExPop4[0]/w" scale="0.01nA"  color="#BBA0AA" timeScale="1ms"/>
    </Display>

    <OutputFile id="of1" fileName="results/adEx_2burst.dat">
        <OutputColumn id="v" quantity="adExPop1[0]/v"/>
        <OutputColumn id="w" quantity="adExPop1[0]/w"/>
    </OutputFile>

    <OutputFile id="of2" fileName="results/adEx_4burst.dat">
        <OutputColumn id="v" quantity="adExPop2[0]/v"/>
        <OutputColumn id="w" quantity="adExPop2[0]/w"/>
    </OutputFile>

    <OutputFile id="of3" fileName="results/adEx_chaos.dat">
        <OutputColumn id="v" quantity="adExPop3[0]/v"/>
        <OutputColumn id="w" quantity="adExPop3[0]/w"/>
    </OutputFile>

    <OutputFile id="of4" fileName="results/adEx_rebound.dat">
        <OutputColumn id="v" quantity="adExPop4[0]/v"/>
        <OutputColumn id="w" quantity="adExPop4[0]/w"/>
    </OutputFile>

</Simulation>

</Lems>
