<?xml version="1.0" encoding="UTF-8"?>
<neuroml xmlns="http://www.neuroml.org/schema/neuroml2" xmlns:xsi="http://www.w3.org/2001/XMLSchema-instance" xsi:schemaLocation="http://www.neuroml.org/schema/neuroml2  https://raw.githubusercontent.com/NeuroML/NeuroML2/development/Schemas/NeuroML2/NeuroML_v2.3.1.xsd" id="pyr_4_sym_soma">

        <!--   Cell files-->
    <include href="pyr_soma_m_out_b_out.cell.nml"/>

    <pulseGenerator id="Input_3" delay="100.0ms" duration="500.0ms" amplitude="2.0E-4uA"/>

    <network id="network" type="networkWithTemperature" temperature="6.3 degC">

        <population id="pyramidal_soma" component="pyr_soma_m_out_b_out" type="populationList" size="1">
            <instance id="0">
                <location x="400.0" y="0.0" z="0.0"/>
            </instance>
        </population>

        <inputList id="Input_3" component="Input_3" population="pyramidal_soma">
            <input id="0" target="../pyramidal_soma/0/pyr_soma_m_out_b_out" destination="synapses"/>
        </inputList>

    </network>

</neuroml>
