<Lems>

        <!-- Example with Bursting Izhikevich cell -->

        <!-- This is a file which can be read and executed by the LEMS Interpreter.
             It imports the LEMS definitions of the core NeuroML 2 Components, creates
             a model in "pure" NeuroML 2 and contains some LEMS elements for running
             a simulation -->

<!-- Specify which component to run -->
<Target component="sim1"/>

<!-- Include core NeuroML2 ComponentType definitions -->
<Include file="Cells.xml"/>
<Include file="Networks.xml"/>
<Include file="Inputs.xml"/>

  <ComponentType name="DisplayList">
    <Parameter name="timeScale" dimension="time"/>
    <Children name="lines" type="Line"/>

    <Text name="title"/>
    <Text name="display"/>
  </ComponentType>

  <ComponentType name="Display">
    <Text name="title"/>
    <Parameter name="xmin" dimension="none"/>
    <Parameter name="xmax" dimension="none"/>
    <Parameter name="ymin" dimension="none"/>
    <Parameter name="ymax" dimension="none"/>

    <Simulation>
      <DataDisplay title="title" dataRegion="xmin,xmax,ymin,ymax"/>
    </Simulation>
  </ComponentType>

  <ComponentType name="Line">
    <Parameter name="scale" dimension="*"/>
    <Parameter name="timeScale" dimension="*"/>
    <Text name="color"/>
    <Text name="save"/>
    <Path name="quantity"/>
    <Simulation>
      <Record quantity="quantity" timeScale="timeScale" scale="scale" color="color" display="display"/>
    </Simulation>
  </ComponentType>

  <ComponentType name="Simulation">
    <Parameter name="length" dimension="time"/>
    <Parameter name="step" dimension="time"/>
    <ComponentReference name="target" type="Component"/>
    <Link name="display" type="Display"/>
    <Children name="outputs" type="DisplayList"/>
    <Dynamics>
      <StateVariable name="t" dimension="time"/>
    </Dynamics>

    <Simulation>
      <Run component="target" variable="t" increment="step" total="length"/>
    </Simulation>
  </ComponentType>

  <ComponentType name="SimulationSet">
    <Children name="simulations" type="Simulation"/>
    <Children name="displays" type="Display"/>
  </ComponentType>

        <!-- Main NeuroML2 content. Based on http://www.izhikevich.org/publications/figure1.m -->

<izhikevichCell id="izBurst" v0 = "-70mV" thresh = "30mV" a ="0.02" b = "0.2" c = "-50" d = "2" Iamp="15" Idur="1000ms" Idel="22ms"/>

    <network id="net1">
        <population id="pop" component="izBurst" size="1"/>
    </network>

<SimulationSet id="sim1">
	<Display id="disp1" title="Example1" xmin="0" xmax="80" ymin="-80" ymax="50"/>

	<Simulation id="sim1" length="200ms" step="0.005ms" target="net1" display="disp1">
    	<DisplayList timeScale="1ms" title="Example 1: Dimensions, Units, ComponentTypes and Components">

        <Line id="l1" quantity="pop[0]/v" scale="1mV"  color="#f33fff" timeScale="1ms"/>
        <Line id="l2" quantity="pop[0]/U" scale="1"  color="#f3aaaf" timeScale="1ms"/>
    	</DisplayList>
	</Simulation>
</SimulationSet>
</Lems>
