<Lems>

    <!-- Example showing new types of network populations & projection templates in v2 -->

    <!-- This is a file which can be read and executed by the LEMS Interpreter.
    It imports the LEMS definitions of the core NeuroML 2 Components, creates
    a model in "pure" NeuroML 2 and contains some LEMS elements for running
    a simulation -->

    <Target component="sim1"/>

    <Include file="NeuroMLCoreDimensions.xml"/>
    <Include file="Cells.xml"/>
    <Include file="Networks.xml"/>
    <Include file="Simulation.xml"/>

    <!-- NeuroML 2 elements... -->

    <spikeGenerator id="spiker" period="30ms"/>

    <spikeGeneratorRandom id="randSpiker" minISI="10ms" maxISI="30ms"/>

    <spikeGeneratorPoisson id="poissonSpiker" averageRate="50per_s"/>

    <spikeArray id="spikes2">
        <spike id="0" time="55ms"/>
        <spike id="1" time="85ms"/>
        <spike id="2" time="135ms"/>
    </spikeArray>

    <spikeArray id="spike100">
        <spike id="0" time="100ms"/>
    </spikeArray>

    <iafCell id="iaf1" leakReversal="-60mV" thresh="-55mV" reset="-65mV" C="1e-5uF" leakConductance="5e-7mS"/>
    <iafCell id="iaf2" leakReversal="-60mV" thresh="-55mV" reset="-70mV" C="1e-5uF" leakConductance="5.2e-7mS"/>

    <expTwoSynapse id="syn1" gbase="0.1nS" erev="0mV" tauRise="0.1ms" tauDecay="2ms">
    </expTwoSynapse>

    <ComponentType name="expOneSynapseW" extends="baseConductanceBasedSynapse">

        <Property name="weight" dimension="none"/>

        <Parameter name="tauDecay" dimension="time" />

        <Child name="notes" type="notes"/>

        <Dynamics>

            <StateVariable name="g" dimension="conductance" exposure="g"/>

            <TimeDerivative variable="g" value="-g / tauDecay" />

            <OnStart>
                <StateAssignment variable="g" value="0" />
            </OnStart>

            <OnEvent port="in">
                <StateAssignment variable="g" value="g + gbase" />
            </OnEvent>

            <DerivedVariable name="i" exposure="i" dimension="current" value="weight * g * (erev - v)" />
        </Dynamics>
    </ComponentType>

    <expOneSynapseW id="synW" gbase="0.1nS" erev="0mV" tauDecay="2ms"/>

    <ComponentType name="connectionWD"
        description="Explicit event connection directly between named components, which gets processed via a new instance of a _synapse component which is created on the target component, transmitted after a time _delay. Synapse should use _weight value. Normally contained inside a _projection_ element."
        extends="connection">

        <Parameter name="weight" dimension="none"/>
        <Parameter name="delay" dimension="time"/>
        <Path name="preCellId"/>
        <Path name="postCellId"/>

        <Structure>
            <With instance="preCellId" as="a"/>
            <With instance="postCellId" as="b"/>
            <EventConnection from="a" to="b" receiver="../synapse" delay="delay">
                <Assign property="weight" value="weight"/>
            </EventConnection>
        </Structure>

    </ComponentType>

    <network id="net2">

        <population id="randSpikersPop" component="randSpiker" size="3"/>

        <population id="poissonSpikersPop" component="poissonSpiker" size="3"/>

        <population id="spikersPop" component="spiker" size="1"/>

        <population id="spikeArrayPop" component="spikes2" size="1"/>

        <population id="spike100Pop" component="spike100" size="3"/>

        <population id="iafPop" component="iaf1" size="3"/>

        <projection id="projection1" presynapticPopulation="spike100Pop" postsynapticPopulation="iafPop" synapse="syn1">
            <connection preCellId="../spike100Pop[0]" postCellId="../iafPop[0]"/>
        </projection>

        <projection id="projection2" presynapticPopulation="spike100Pop" postsynapticPopulation="iafPop" synapse="synW">
            <connectionWD preCellId="../spike100Pop[1]" postCellId="../iafPop[1]" weight="0.5"  delay="10ms" />
            <connectionWD preCellId="../spike100Pop[2]" postCellId="../iafPop[2]" weight="0.25" delay="15ms" />
        </projection>

    </network>

    <!-- End of NeuroML 2 elements... -->

    <Simulation id="sim1" length="300ms" step="0.01ms" target="net2">

        <Display id="dUniform" title="Ex12: random (uniform ISI) spike sources" timeScale="1ms" xmin="0" xmax="300" ymin="-5" ymax="35">
            <Line id="l0" quantity="randSpikersPop[0]/tsince" scale="1ms" color="#000000" timeScale="1ms"/>
            <Line id="l1" quantity="randSpikersPop[1]/tsince" scale="1ms" color="#00ff00" timeScale="1ms"/>
            <Line id="l2" quantity="randSpikersPop[2]/tsince" scale="1ms" color="#ddff00" timeScale="1ms"/>
        </Display>

        <Display id="dPoisson" title="Ex12: random (Poisson: exponential ISI) spike sources" timeScale="1ms" xmin="0" xmax="300" ymin="-5" ymax="35">
            <Line id="l0" quantity="poissonSpikersPop[0]/tsince" scale="1ms" color="#000000" timeScale="1ms"/>
            <Line id="l1" quantity="poissonSpikersPop[1]/tsince" scale="1ms" color="#00ff00" timeScale="1ms"/>
            <Line id="l2" quantity="poissonSpikersPop[2]/tsince" scale="1ms" color="#ddff00" timeScale="1ms"/>
        </Display>

        <Display id="d1" title="Ex12: spikersPop" timeScale="1ms" xmin="0" xmax="300" ymin="-5" ymax="105">
            <Line id="l0" quantity="spikersPop[0]/tsince" scale="1ms" color="#000000" timeScale="1ms"/>
            <Line id="l1" quantity="spike100Pop[0]/tsince" scale="1ms" color="#ffff00" timeScale="1ms"/>
        </Display>

        <Display id="d2" title="Ex12: spike array" timeScale="1ms" xmin="0" xmax="300" ymin="-20" ymax="270">
            <Line id="l0" quantity="spikeArrayPop[0]/0/tsince" scale="1ms" color="#000000" timeScale="1ms"/>
            <Line id="l1" quantity="spikeArrayPop[0]/1/tsince" scale="1ms" color="#00ff00"  timeScale="1ms"/>
            <Line id="l2" quantity="spikeArrayPop[0]/2/tsince" scale="1ms" color="#ddff00" timeScale="1ms"/>
            <Line id="l3" quantity="spikeArrayPop[0]/tsince" scale="1ms" color="#ff0000" timeScale="1ms"/>
        </Display>

        <Display id="dcells" title="Ex12: iafPop" timeScale="1ms" xmin="0" xmax="300" ymin="-65" ymax="-58">
            <Line id="l0" quantity="iafPop[0]/v" scale="1mV" color="#000000" timeScale="1ms"/>
            <Line id="l1" quantity="iafPop[1]/v" scale="1mV" color="#008800" timeScale="1ms"/>
            <Line id="l2" quantity="iafPop[2]/v" scale="1mV" color="#880000" timeScale="1ms"/>
        </Display>

    </Simulation>

</Lems>
