<Lems>

        <!-- Example with various input currents/spike sources -->

        <!-- This is a file which can be read and executed by the LEMS Interpreter.
             It imports the LEMS definitions of the core NeuroML 2 Components, creates
             a model in "pure" NeuroML 2 and contains some LEMS elements for running
             a simulation -->

<!-- Specify which component to run -->
<Target component="sim1"/>

<!-- Include core NeuroML2 ComponentType definitions -->
<Include file="Cells.xml"/>
<Include file="Networks.xml"/>
<Include file="Inputs.xml"/>
<Include file="Simulation.xml"/>

<adExIaFCell id="adExBurst4"  C="281pF" gL="30nS" EL="-70.6mV" reset="-47.2mV" VT = "-50.4mV" thresh = "-40.4mV" delT="2mV" tauw="40ms"  a ="4nS"   b = "0.08nA"
                refract="0ms" Iamp="0.0nA" Idel="0ms" Idur="2000ms"/>

<pulseGenerator id="pulseGen0" delay="50ms" duration="200ms" amplitude="0.8 nA" />

<sineGenerator id="sg0" phase="0" delay="50ms" duration="200ms" amplitude="1.2nA" period="50ms"/>

<rampGenerator id="rg0" delay="50ms" duration="200ms" startAmplitude="0.5nA" finishAmplitude="2nA" baselineAmplitude="0nA"/>

<voltageClamp id="vClamp0" delay="50ms" duration="200ms" targetVoltage="-50mV" seriesResistance="10ohm"/>

<network id="net1">
    <population id="adExPop" component="adExBurst4" size="4"/>
    <explicitInput target="adExPop[0]" input="pulseGen0"/>
    <explicitInput target="adExPop[1]" input="sg0"/>
    <explicitInput target="adExPop[2]" input="rg0"/>
    <explicitInput target="adExPop[3]" input="vClamp0"/>
</network>

        <!-- End of NeuroML2 content -->

<Simulation id="sim1" length="300ms" step="0.05ms" target="net1">

    <Display id="d0" title="Ex16: Adaptive exponential cell, curent clamp input" timeScale="1ms" xmin="0" xmax="300" ymin="-80" ymax="20">
        <Line id ="adEx0" quantity="adExPop[0]/v" scale="1mV"  color="#ee40FF" timeScale="1ms"/>
        <Line id ="adEx0i" quantity="adExPop[0]/pulseGen0/i" scale="0.1nA"  color="#333333" timeScale="1ms"/>
    </Display>
    <Display id="d1" title="Ex16: Adaptive exponential cell, input" timeScale="1ms" xmin="0" xmax="300" ymin="-120" ymax="25">
        <Line id ="adEx1" quantity="adExPop[1]/v" scale="1mV"  color="#ee40FF" timeScale="1ms"/>
        <Line id ="adEx1i" quantity="adExPop[1]/sg0/i" scale="0.1nA"  color="#333333" timeScale="1ms"/>
    </Display>
    <Display id="d2" title="Ex16: Adaptive exponential cell, " timeScale="1ms" xmin="0" xmax="300" ymin="-110" ymax="30">
        <Line id ="adEx2" quantity="adExPop[2]/v" scale="1mV"  color="#ee40FF" timeScale="1ms"/>
        <Line id ="adEx2i" quantity="adExPop[2]/rg0/i" scale="0.1nA"  color="#333333" timeScale="1ms"/>
    </Display>
    <Display id="d3" title="Ex16: Adaptive exponential cell, voltage clamp" timeScale="1ms" xmin="0" xmax="300" ymin="-110" ymax="35">
        <Line id ="adEx3" quantity="adExPop[3]/v" scale="1mV"  color="#ee40FF" timeScale="1ms"/>
        <Line id ="adEx3i" quantity="adExPop[3]/vClamp0/i" scale="0.1nA"  color="#333333" timeScale="1ms"/>
    </Display>

</Simulation>

</Lems>
