<Lems>

        <!-- Example with Simple cell with Hodgkin Huxley channels -->

        <!-- This is a file which can be read and executed by the LEMS Interpreter.
             It imports the LEMS definitions of the core NeuroML 2 Components, creates
             a model in "pure" NeuroML 2 and contains some LEMS elements for running
             a simulation -->

<!-- Specify which component to run -->
<Target component="sim1"/>

<!-- Include core NeuroML2 ComponentType definitions -->
<Include file="Cells.xml"/>
<Include file="Networks.xml"/>
<Include file="Simulation.xml"/>

        <!-- Main NeuroML2 content -->

<ionChannel id="passive" type="ionChannelPassive" conductance="10pS"/>

<ionChannel id="na" type="ionChannelHH" conductance="10pS">

   <gateHHrates id="m" instances="3">
        <forwardRate type="HHExpLinearRate" rate="1per_ms" midpoint="-40mV" scale="10mV"/>
        <reverseRate type="HHExpRate" rate="4per_ms" midpoint="-65mV" scale="-18mV"/>
   </gateHHrates>

   <gateHHrates id="h" instances="1">
       <forwardRate type="HHExpRate" rate="0.07per_ms" midpoint="-65mV" scale="-20mV"/>
       <reverseRate type="HHSigmoidRate" rate="1per_ms" midpoint="-35mV" scale="10mV"/>
       <!--<steadyState type="HHSigmoidVariable" rate="1" midpoint="-40mV" scale="10mV"/>-->
   </gateHHrates>

</ionChannel>

<ionChannel id="k" type="ionChannelHH" conductance="10pS">
    <gateHHrates id="n" instances="4">
        <forwardRate type="HHExpLinearRate" rate="0.1per_ms" midpoint="-55mV" scale="10mV"/>
        <reverseRate type="HHExpRate" rate="0.125per_ms" midpoint="-65mV" scale="-80mV"/>
    </gateHHrates>
</ionChannel>

<abstractCell id="hhcell" type="pointCellCondBased" C="10pF"  v0="-65mV" thresh="20mV">

    <channelPopulation id="leak" ionChannel="passive" number="300" erev="-54.3mV"/>
    <channelPopulation id="naChans" ionChannel="na" number="120000" erev="50mV"/><!-- -->
    <channelPopulation id="kChans" ionChannel="k" number="36000" erev="-77mV"/>

</abstractCell>

<pulseGenerator id="pulseGen1" delay="50ms" duration="50ms" amplitude="0.08 nA" />

<voltageClamp id="vClamp1" delay="150ms" duration="50ms" targetVoltage="0mV" seriesResistance="10ohm"/>

<network id="net1">
    <population id="hhpop" component="hhcell" size="1"/>
    <explicitInput target="hhpop[0]" input="pulseGen1" destination="synapses"/>
    <explicitInput target="hhpop[0]" input="vClamp1" destination="synapses"/>
</network>

        <!-- End of NeuroML2 content -->

<!--
<Simulation id="sim1" length="150ms" step="0.01ms" target="net1">

    <Display id="d1" title="Ex1: Simple HH example: Voltage" timeScale="1ms">
        <Line id="l1" quantity="hhpop[0]/v" scale="1mV"  color="#ffffff" save="examples/testResults/hh_v.dat"/>
    </Display>

    <Display id="d2" title="Ex1: Simple HH example: rate variables" timeScale="1ms">

        <Line id="l2" quantity="hhpop[0]/naChans/na/m/q" scale="1"  color="#000000" save="examples/testResults/hh_m.dat"/>
        <Line id="l3" quantity="hhpop[0]/naChans/na/h/q" scale="1"  color="#ff0000" save="examples/testResults/hh_h.dat"/>
        <Line id="l4" quantity="hhpop[0]/kChans/k/n/q" scale="1"  color="#0000ff" save="examples/testResults/hh_n.dat"/>
    </Display>

    <Display id="d3" title="Ex1: Simple HH example: currents" timeScale="1ms">
        <Line id="li1" quantity="hhpop[0]/pulseGen1/i" scale="1nA"  color="#000000" save="examples/testResults/hh_i.dat"/>
        <Line id="li2" quantity="hhpop[0]/vClamp1/i" scale="1nA"  color="#00aa00" save="examples/testResults/hh_iv.dat"/>
    </Display>

</Simulation>-->

    <SimulationSet id="sim1">
        <Display id="disp1" title="Ex1: Simple HH example: Voltage" xmin="0" xmax="150" ymin="-90" ymax="60"/>
	<!--<Display id="disp2" title="Example1: m,h,n" xmin="0" xmax="80" ymin="-80" ymax="50"/>-->

        <Simulation id="sim1" length="150ms" step="0.01ms" target="net1" display="disp1">

            <DisplayList timeScale="1ms" title="Example 1: Dimensions, Units, ComponentTypes and Components">

                <Line id="l1" quantity="hhpop[0]/v" scale="1mV"  color="#f33fff" timeScale="1ms"/>
        <!--<Line id="l2" quantity="pop[0]/U" scale="1"  color="#f3aaaf" timeScale="1ms"/>-->
            </DisplayList>

         <!--<DisplayList id="d2" title="Ex1: Simple HH example: rate variables" timeScale="1ms">

            <Line id="l2" quantity="pop[0]/naChans/na/m/q" scale="1"  color="#000000" save="examples/testResults/hh_m.dat" timeScale="1ms"/>
            <Line id="l3" quantity="pop[0]/naChans/na/h/q" scale="1"  color="#ff0000" save="examples/testResults/hh_h.dat" timeScale="1ms"/>
            <Line id="l4" quantity="pop[0]/kChans/k/n/q" scale="1"  color="#0000ff" save="examples/testResults/hh_n.dat" timeScale="1ms"/>
        </DisplayList>-->

        </Simulation>
    </SimulationSet>

</Lems>
