<Lems>

        <!-- Example with Simple cell specifying segment details-->

        <!-- This is a file which can be read and executed by the LEMS Interpreter.
             It imports the LEMS definitions of the core NeuroML 2 Components,
             imports in "pure" NeuroML 2 and contains some LEMS elements for running
             a simulation -->

        <Target component="sim1"/>

        <Include file="Cells.xml"/>
        <Include file="Networks.xml"/>
        <Include file="Simulation.xml"/>

        <!-- Including file with a <neuroml> root, a "real" NeuroML 2 file -->
        <Include file="../examples/NML2_SingleCompHHCell.nml"/>

    <SimulationSet id="sim1">
        <Display id="disp1" title="Ex5: HH cell with simple morphology: voltage" xmin="0" xmax="300" ymin="-90" ymax="50"/>

        <Simulation id="sim1" length="300ms" step="0.01ms" target="net1" display="disp1">

            <DisplayList timeScale="1ms" title="Ex5: HH cell with simple morphology: voltage">

                <Line id ="iaf1" quantity="hhpop[0]/v" scale="1mV"  color="#000000"  timeScale="1ms" save="examples/testResults/iaf_tau_v.dat"/>
            </DisplayList>

        </Simulation>
    </SimulationSet>
        <!--
        <Simulation id="sim1" length="300ms" step="0.01ms" target="net1">
                <Display id="d1" title="Ex5: HH cell with simple morphology: voltage" timeScale="1ms">
                        <Line id="l1" quantity="hhpop[0]/v" scale="1mV" color="#ffffff" save="examples/testResults/mml_v.dat"/>
                        <Line id="l2" quantity="hhpop[0]/spiking" scale="0.1V"  color="#004040"/>
                        <Line id="l3" quantity="hhpop[0]/debugVal" scale="1V"  color="#999999" save="examples/testResults/debug.dat"/>
                </Display>
                <Display id="d2" title="Ex5: HH cell with simple morphology: rate variables" timeScale="1ms">
                        <Line id="m" quantity="hhpop[0]/bioPhys1/membraneProperties/naChans/na/m/q" scale="1"  color="#000000" save="examples/testResults/hh_m.dat"/>
                        <Line id="h" quantity="hhpop[0]/bioPhys1/membraneProperties/naChans/na/h/q" scale="1"  color="#ff0000" save="examples/testResults/hh_h.dat"/>
                        <Line id="n" quantity="hhpop[0]/bioPhys1/membraneProperties/kChans/k/n/q" scale="1"  color="#0000ff" save="examples/testResults/hh_n.dat"/>
                </Display>
                <Display id="d3" title="Ex5: HH cell with simple morphology: current densities" timeScale="1ms">
                        <Line id="ina" quantity="hhpop[0]/bioPhys1/membraneProperties/naChans/iDensity" scale="1"  color="#000000" save="examples/testResults/i_na.dat"/>
                        <Line id="ik" quantity="hhpop[0]/bioPhys1/membraneProperties/kChans/iDensity" scale="1"  color="#ff0000" save="examples/testResults/i_k.dat"/>
                </Display>
                <Display id="d3" title="Ex5: HH cell with simple morphology: conductance densities" timeScale="1ms">
                        <Line id="gna" quantity="hhpop[0]/bioPhys1/membraneProperties/naChans/gDensity" scale="1"  color="#000000" save="examples/testResults/g_na.dat"/>
                        <Line id="gk" quantity="hhpop[0]/bioPhys1/membraneProperties/kChans/gDensity" scale="1"  color="#ff0000" save="examples/testResults/g_k.dat"/>
                </Display>
        </Simulation>-->

</Lems>
