<Lems>

        <!-- Example with Adaptive exponential integrate-and-fire model -->

        <!-- This is a file which can be read and executed by the LEMS Interpreter.
             It imports the LEMS definitions of the core NeuroML 2 Components, creates
             a model in "pure" NeuroML 2 and contains some LEMS elements for running
             a simulation -->

<!-- Specify which component to run -->
<Target component="sim1"/>

<!-- Include core NeuroML2 ComponentType definitions -->
<Include file="Cells.xml"/>
<Include file="Networks.xml"/>
<Include file="Simulation.xml"/>

        <!-- Main NeuroML2 content. http://www.scholarpedia.org/article/Adaptive_exponential_integrate-and-fire_model -->

<adExIaFCell id="adExBurst2"     C="281pF" gL="30nS" EL="-70.6mV" reset="-48.5mV" VT = "-50.4mV" thresh = "-40.4mV" delT="2mV" tauw="40ms"  a ="4nS"   b = "0.08nA" refract="0ms" Iamp="0.8nA"  Idel="0ms"   Idur="2000ms"/>
<adExIaFCell id="adExBurst4"     C="281pF" gL="30nS" EL="-70.6mV" reset="-47.2mV" VT = "-50.4mV" thresh = "-40.4mV" delT="2mV" tauw="40ms"  a ="4nS"   b = "0.08nA" refract="0ms" Iamp="0.8nA"  Idel="0ms"   Idur="2000ms"/>
<adExIaFCell id="adExBurstChaos" C="281pF" gL="30nS" EL="-70.6mV" reset="-48mV"   VT = "-50.4mV" thresh = "-40.4mV" delT="2mV" tauw="40ms"  a ="4nS"   b = "0.08nA" refract="0ms" Iamp="0.8nA"  Idel="0ms"   Idur="2000ms"/>
<adExIaFCell id="adExRebound"    C="281pF" gL="30nS" EL="-60mV"   reset="-51mV"   VT = "-54mV"   thresh = "-30mV"   delT="2mV" tauw="150ms" a ="200nS" b = "0.1nA"  refract="0ms" Iamp="-0.5nA" Idel="150ms" Idur="50ms"/>

<network id="net1">
    <population id="adExPop1" component="adExBurst2" size="1"/>
    <population id="adExPop2" component="adExBurst4" size="1"/>
    <population id="adExPop3" component="adExBurstChaos" size="1"/>
    <population id="adExPop4" component="adExRebound" size="1"/>
</network>

        <!-- End of NeuroML2 content -->

<!--
<Simulation id="sim1" length="300ms" step="0.025ms" target="net1">

    <Display id="d1" title="Ex8: Adaptive exponential cell: 2 spike burst" timeScale="1ms">
        <Line id ="adEx1" quantity="adExPop1[0]/v" scale="1mV"  color="#ee40FF" save="examples/testResults/adEx_V1.dat"/>
        <Line id ="adEx2" quantity="adExPop1[0]/w" scale="0.01nA"  color="#BBA0AA" save="examples/testResults/adEx_w1.dat"/>
    </Display>

    <Display id="d2" title="Ex8: Adaptive exponential cell: 4 spike burst" timeScale="1ms">
        <Line id ="adEx1" quantity="adExPop2[0]/v" scale="1mV"  color="#ee40FF" save="examples/testResults/adEx_V2.dat"/>
        <Line id ="adEx2" quantity="adExPop2[0]/w" scale="0.01nA"  color="#BBA0AA" save="examples/testResults/adEx_w2.dat"/>
    </Display>

    <Display id="d3" title="Ex8: Adaptive exponential cell: chaotic spiking" timeScale="1ms">
        <Line id ="adEx1" quantity="adExPop3[0]/v" scale="1mV"  color="#ee40FF" save="examples/testResults/adEx_V3.dat"/>
        <Line id ="adEx2" quantity="adExPop3[0]/w" scale="0.01nA"  color="#BBA0AA" save="examples/testResults/adEx_w3.dat"/>
    </Display>

    <Display id="d4" title="Ex8: Adaptive exponential cell: rebound burst" timeScale="1ms">
        <Line id ="adEx1" quantity="adExPop4[0]/v" scale="1mV"  color="#ee40FF" save="examples/testResults/adEx_V4.dat"/>
        <Line id ="adEx2" quantity="adExPop4[0]/w" scale="0.01nA"  color="#BBA0AA" save="examples/testResults/adEx_w4.dat"/>
    </Display>

</Simulation>-->

<SimulationSet id="sim1">
	<Display id="disp1" title="Ex8: Adaptive exponential cell: 2 spike burst" xmin="0" xmax="300" ymin="-90" ymax="50"/>

	<Simulation id="sim1" length="300ms" step="0.005ms" target="net1" display="disp1">
    	<DisplayList timeScale="1ms" title="Ex8: Adaptive exponential cell: 2 spike burst">

        <Line id="l1" quantity="adExPop1[0]/v" scale="1mV"  color="#f33fff" timeScale="1ms"/>
        <Line id="l2" quantity="adExPop1[0]/w" scale="0.01nA"  color="#f3aaaf" timeScale="1ms"/>
    	</DisplayList>
	</Simulation>
</SimulationSet>

</Lems>
