<Lems xmlns="http://www.neuroml.org/lems/0.7.6"
      xmlns:xsi="http://www.w3.org/2001/XMLSchema-instance"
      xsi:schemaLocation="http://www.neuroml.org/lems/0.7.6 ../../LEMS/Schemas/LEMS/LEMS_v0.7.6.xsd"
      description="Network descriptions for NeuroML 2. Describes _network_ elements containing _population_s (potentially of type _populationList_, and so specifying a list of cell _location_s), _projection_s (i.e. lists of _connection_s) and _input_s.">

    <!-- A number of network elements for use in NeuroML 2 documents  -->

    <Include file="NeuroMLCoreDimensions.xml"/>
    <Include file="Synapses.xml"/>

    <ComponentType name="network"
                   description="Network containing: _population_s (potentially of type _populationList_, and so specifying a list of cell _location_s); _projection_s (with lists of _connection_s) and/or _explicitConnection_s; and _inputList_s (with lists of _input_s) and/or _explicitInput_s. Note: often in NeuroML this will be of type _networkWithTemperature_ if there are temperature dependent elements (e.g. ion channels)."
                   extends="baseStandalone">

        <!-- To be removed in NMLv2.3 - See https://github.com/NeuroML/NeuroML2/issues/171-->
        <Children name="regions" type="region"/>

        <Children name="populations" type="basePopulation"/>

        <Children name="projections" type="projection"/>
        <Children name="synapticConnections" type="explicitConnection"/>  <!-- Connection either directly between cells or to synapse attachment on post cell-->

        <Children name="electricalProjection" type="electricalProjection"/>
        <Children name="continuousProjection" type="continuousProjection"/>

        <Children name="explicitInputs" type="explicitInput"/>
        <Children name="inputs" type="inputList"/>

    </ComponentType>

    <ComponentType name="networkWithTemperature" description="Same as _network_, but with an explicit _temperature for temperature dependent elements (e.g. ion channels)" extends="network">

        <Parameter name="temperature" dimension="temperature"/>

    </ComponentType>

    <ComponentType name="basePopulation"
                   description="A population of multiple instances of a specific _component, which anything which extends _baseCell_. "
                   extends="baseStandalone">

        <Child name="notes" type="notes"/>
        <Child name="annotation" type="annotation"/>
        <Children name="property" type="property"/>

        <ComponentReference name="component" type="baseCell"/>
    </ComponentType>

    <ComponentType name="population" extends="basePopulation" description="A population of components, with just one parameter for the _size, i.e. number of components to create. Note: quite often this is used with type=_populationList_ which means the size is determined by the number of _instance_s (with _location_s) in the list. The _size attribute is still set, and there will be a validation error if this does not match the number in the list.">
        <Parameter name="size" dimension="none" description="Number of instances of this Component to create when the population is instantiated"/>
        <Structure>
            <MultiInstantiate number="size" component="component"/>
        </Structure>
    </ComponentType>

    <ComponentType name="populationList" extends="basePopulation" description="An explicit list of _instance_s (with _location_s) of components in the population. ">
        <Children name="instances" type="instance"/>

        <Text name="size" description="Note: the size of the populationList to create is set by the number of explicitly defined instances. The size attribute is still set, and there will be a validation error if this does not match the number in the list."/> <!--Note: Text, not Parameter, as this is not actually used by LEMS, the <instance> elements determine the size, this attribute is really just metadata, though the two should be consistent-->
    </ComponentType>

    <ComponentType name="instance" description="Specifies a single instance of a component in a _population_ (placed at _location_).">
        <Child name="location" type="location"/>
        <Structure>
            <ChildInstance component="../component"/>
        </Structure>

    </ComponentType>

    <ComponentType name="location" description="Specifies the (x,y,z) location of a single _instance_ of a component in a _population_">
        <Parameter name="x" dimension="none"/>
        <Parameter name="y" dimension="none"/>
        <Parameter name="z" dimension="none"/>
    </ComponentType>

    <!-- To be removed in NMLv2.3 - See https://github.com/NeuroML/NeuroML2/issues/171-->
    <ComponentType name="region" description="Initial attempt to specify 3D region for placing cells. Work in progress...">
        <Child name="rectangularExtent" type="rectangularExtent"/>
    </ComponentType>

    <ComponentType name="rectangularExtent" description="For defining a 3D rectangular box">
        <Parameter name="xStart" dimension="none"/>
        <Parameter name="yStart" dimension="none"/>
        <Parameter name="zStart" dimension="none"/>
        <Parameter name="xLength" dimension="none"/>
        <Parameter name="yLength" dimension="none"/>
        <Parameter name="zLength" dimension="none"/>
    </ComponentType>

    <ComponentType name="projection"
        description="Projection from one population, _presynapticPopulation to another, _postsynapticPopulation, through _synapse. Contains lists of _connection_ or _connectionWD_ elements.">

        <Children name="connections" type="connection"/>
        <Children name="connectionsWD" type="connectionWD"/>
        <ComponentReference name="synapse" type="baseSynapse"/>
        <Path name="presynapticPopulation"/>
        <Path name="postsynapticPopulation"/>
    </ComponentType>

    <ComponentType name="explicitConnection"
        description="Explicit event connection between components">
        <Path name="from"/>
        <Path name="to"/>
        <Text name="targetPort"/>
    </ComponentType>

    <ComponentType name="connection"
        description="Event connection directly between named components, which gets processed via a new instance of a _synapse component which is created on the target component. Normally contained inside a _projection_ element.">

        <Path name="preCellId"/>
        <Path name="postCellId"/>
        <Text name="destination"/>
        <Text name="preFractionAlong"/>
        <Text name="postFractionAlong"/>
        <Text name="preSegmentId"/>
        <Text name="postSegmentId"/>

        <Structure>
            <With instance="preCellId" as="a"/>
            <With instance="postCellId" as="b"/>
            <EventConnection from="a" to="b" receiver="../synapse" receiverContainer="destination" sourcePort="sourcePort" targetPort="targetPort"/>
        </Structure>

    </ComponentType>

    <ComponentType name="synapticConnection"
        description="Explicit event connection between named components, which gets processed via a new instance of a _synapse component which is created on the target component"
        extends="explicitConnection">

        <ComponentReference name="synapse" type="baseSynapse"/>
        <Path name="from"/>
        <Path name="to"/>
        <Text name="destination"/>

        <Structure>
            <With instance="from" as="a"/>
            <With instance="to" as="b"/>
            <EventConnection from="a" to="b" receiver="synapse" receiverContainer="destination" sourcePort="sourcePort" targetPort="targetPort"/>
        </Structure>
    </ComponentType>

    <ComponentType name="synapticConnectionWD"
                   description="Explicit event connection between named components, which gets processed via a new instance of a _synapse component which is created on the target component, includes setting of _weight and _delay for the synaptic connection"
                   extends="synapticConnection">

        <Parameter name="weight" dimension="none"/>
        <Parameter name="delay" dimension="time"/>

        <Path name="from"/> <!-- Ideally this should be taken from extended comp type -->
        <Path name="to"/>   <!-- Ideally this should be taken from extended comp type -->

        <Structure>
            <With instance="from" as="a"/>
            <With instance="to" as="b"/>
            <EventConnection from="a" to="b" receiver="synapse" delay="delay">
                <Assign property="weight" value="weight"/>
            </EventConnection>
        </Structure>

    </ComponentType>

    <ComponentType name="connectionWD"
                   description="Event connection between named components, which gets processed via a new instance of a synapse component which is created on the target component, includes setting of _weight and _delay for the synaptic connection"
                   extends="connection">

        <Parameter name="weight" dimension="none"/>
        <Parameter name="delay" dimension="time"/>
        <Path name="preCellId"/>
        <Path name="postCellId"/>
        <Text name="destination"/>
        <Text name="preFractionAlong"/>
        <Text name="postFractionAlong"/>
        <Text name="preSegmentId"/>
        <Text name="postSegmentId"/>

        <Structure>
            <With instance="preCellId" as="a"/>
            <With instance="postCellId" as="b"/>
            <EventConnection from="a" to="b" receiver="../synapse" delay="delay">
                <Assign property="weight" value="weight"/>
            </EventConnection>
        </Structure>

    </ComponentType>

    <ComponentType name="electricalConnection"
                   description="To enable connections between populations through gap junctions.">

        <IndexParameter name="preCell"/>
        <IndexParameter name="postCell"/>

        <ComponentReference name="synapse" type="gapJunction"/>

        <ComponentRequirement name="presynapticPopulation"/>
        <ComponentRequirement name="postsynapticPopulation"/>

        <Structure>
            <With list="presynapticPopulation" index="preCell" as="a"/>
            <With list="postsynapticPopulation" index="postCell" as="b"/>
            <Tunnel name="peer" endA="a" endB="b" componentA="synapse" componentB="synapse"/>
        </Structure>

    </ComponentType>

    <ComponentType name="electricalConnectionInstance"
                   description="To enable connections between populations through gap junctions. Populations need to be of type _populationList_ and contain _instance_ and _location_ elements.">

        <ComponentReference name="synapse" type="gapJunction"/>

        <Path name="preCell"/>
        <Path name="postCell"/>

        <Text name="preFractionAlong"/>
        <Text name="postFractionAlong"/>
        <Text name="preSegment"/>
        <Text name="postSegment"/>

        <Structure>
            <With instance="preCell" as="a"/>
            <With instance="postCell" as="b"/>
            <Tunnel name="peer" endA="a" endB="b" componentA="synapse" componentB="synapse"/>
        </Structure>

    </ComponentType>

    <ComponentType name="electricalConnectionInstanceW"
                   description="To enable connections between populations through gap junctions. Populations need to be of type _populationList_ and contain _instance_ and _location_ elements. Includes setting of _weight for the connection"
                   extends="electricalConnectionInstance">

        <Parameter name="weight" dimension="none"/>

        <!-- Ideally these should be inherited from the extended CT, but jLEMS
        complains about this... adding them here for a quieter life... -->
        <Path name="preCell"/>
        <Path name="postCell"/>
        <Text name="preFractionAlong"/>
        <Text name="postFractionAlong"/>
        <Text name="preSegment"/>
        <Text name="postSegment"/>

        <Structure>
            <With instance="preCell" as="a"/>
            <With instance="postCell" as="b"/>
            <Tunnel name="peer" endA="a" endB="b" componentA="synapse" componentB="synapse">
                <Assign property="weight" value="weight"/>
            </Tunnel>
        </Structure>

    </ComponentType>

    <ComponentType name="electricalProjection"
                   description="A projection between _presynapticPopulation to another _postsynapticPopulation through gap junctions.">
        <Children name="connections" type="electricalConnection"/>
        <Children name="connectionInstances" type="electricalConnectionInstance"/>
        <ComponentReference name="presynapticPopulation" type="population" local="true"/>
        <ComponentReference name="postsynapticPopulation" type="population" local="true"/>
    </ComponentType>

    <ComponentType name="continuousConnection"
                   description="An instance of a connection in a _continuousProjection_ between _presynapticPopulation to another _postsynapticPopulation through a _preComponent at the start and _postComponent at the end. Can be used for analog synapses.">

        <IndexParameter name="preCell"/>
        <IndexParameter name="postCell"/>

        <ComponentReference name="preComponent" type="baseGradedSynapse"/>
        <ComponentReference name="postComponent" type="baseGradedSynapse"/>

        <ComponentRequirement name="presynapticPopulation"/>
        <ComponentRequirement name="postsynapticPopulation"/>

        <Structure>
            <With list="presynapticPopulation" index="preCell" as="a"/>
            <With list="postsynapticPopulation" index="postCell" as="b"/>
            <Tunnel name="peer" endA="a" endB="b" componentA="preComponent" componentB="postComponent"/>
        </Structure>

    </ComponentType>

    <ComponentType name="continuousConnectionInstance"
                   description="An instance of a connection in a _continuousProjection_ between _presynapticPopulation to another _postsynapticPopulation through a _preComponent at the start and _postComponent at the end. Populations need to be of type _populationList_ and contain _instance_ and _location_ elements. Can be used for analog synapses.">

        <ComponentReference name="preComponent" type="baseGradedSynapse"/>
        <ComponentReference name="postComponent" type="baseGradedSynapse"/>

        <Path name="preCell"/>
        <Path name="postCell"/>

        <Text name="preFractionAlong"/>
        <Text name="postFractionAlong"/>
        <Text name="preSegment"/>
        <Text name="postSegment"/>

        <Structure>
            <With instance="preCell" as="a"/>
            <With instance="postCell" as="b"/>
            <Tunnel name="peer" endA="a" endB="b" componentA="preComponent" componentB="postComponent"/>
        </Structure>

    </ComponentType>

    <ComponentType name="continuousConnectionInstanceW"

                   description="An instance of a connection in a _continuousProjection_ between _presynapticPopulation to another _postsynapticPopulation through a _preComponent at the start and _postComponent at the end. Populations need to be of type _populationList_ and contain _instance_ and _location_ elements. Can be used for analog synapses. Includes setting of _weight for the connection"
                   extends="continuousConnectionInstance">

        <Parameter name="weight" dimension="none"/>

        <!-- Ideally these should be inherited from the extended CT, but jLEMS
        complains about this... adding them here for a quieter life... -->
        <Path name="preCell"/>
        <Path name="postCell"/>
        <Text name="preFractionAlong"/>
        <Text name="postFractionAlong"/>
        <Text name="preSegment"/>
        <Text name="postSegment"/>

        <Structure>
            <With instance="preCell" as="a"/>
            <With instance="postCell" as="b"/>
            <Tunnel name="peer" endA="a" endB="b" componentA="preComponent" componentB="postComponent">
                <Assign property="weight" value="weight"/>
            </Tunnel>
        </Structure>

    </ComponentType>

    <ComponentType name="continuousProjection"
                   description="A projection between _presynapticPopulation and _postsynapticPopulation through components _preComponent at the start and _postComponent at the end of a _continuousConnection_ or _continuousConnectionInstance_. Can be used for analog synapses.">

        <Children name="connections" type="continuousConnection"/>
        <Children name="connectionInstances" type="continuousConnectionInstance"/>

        <ComponentReference name="presynapticPopulation" type="population" local="true"/>
        <ComponentReference name="postsynapticPopulation" type="population" local="true"/>

    </ComponentType>

    <!--   Not yet stable...

    <Component Type name="EventConnectivity">
        <Child name="Connections" type="ConnectionPattern"/>
        <Link name="source" type="population"/>
        <Link name="target" type="population"/>
    </ComponentType>

    <Component Type name="ConnectionPattern">
    </ComponentType>

    <Component Type name="AllAll" extends="ConnectionPattern">
        <Dynamics>
            <Build>
                <ForEach instances="../source" as="a">
                     <ForEach instances="../target" as="b">
                          <EventConnection from="a" to="b"/>
                     </ForEach>
                </ForEach>
            </Build>
        </Dynamics>
    </ComponentType>-->

    <ComponentType name="explicitInput" description="An explicit input (anything which extends _basePointCurrent_) to a target cell in a population">

        <ComponentReference name="input" type="basePointCurrent"/>

        <Path name="target"/>

        <Text name="destination"/>
        <Text name="sourcePort"/>
        <Text name="targetPort"/>

        <Structure>
            <With instance="target" as="a"/>
            <With instance="target" as="b"/>

            <EventConnection from="a" to="b" receiver="input" receiverContainer="destination"/>
        </Structure>
    </ComponentType>

    <ComponentType name="inputList" description="An explicit list of _input_s to a _population.">

        <Children name="inputs" type="input"/>
        <ComponentReference name="component" type="basePointCurrent"/>
        <Text name="population"/>

    </ComponentType>

    <ComponentType name="input" description="Specifies a single input to a _target, optionally giving the _segmentId (default 0) and _fractionAlong the segment (default 0.5).">

        <Path name="target"/>

        <Text name="segmentId" description="Optional specification of the segment to target, default 0"/>
        <Text name="fractionAlong" description="Optional specification of the fraction along the specified segment, default 0.5"/>

        <Text name="destination"/>
        <Structure>

            <With instance="target" as="a"/>
            <With instance="target" as="b"/>

            <EventConnection from="a" to="b" receiver="../component" receiverContainer="destination"/>
        </Structure>

    </ComponentType>

    <ComponentType name="inputW" description="Specifies input lists. Can set _weight to scale individual inputs." extends="input">

        <Parameter name="weight" dimension="none"/>

        <Path name="target"/> <!-- Ideally this should be taken from extended comp type -->
        <Text name="destination"/> <!-- Ideally this should be taken from extended comp type -->

        <Structure>

            <With instance="target" as="a"/>
            <With instance="target" as="b"/>

            <EventConnection from="a" to="b" receiver="../component" receiverContainer="destination">
                <Assign property="weight" value="weight"/>
            </EventConnection>
        </Structure>

    </ComponentType>

</Lems>
