<Lems>

        <!-- Example with Simple cell specifying segment details-->

        <!-- This is a file which can be read and executed by the LEMS Interpreter.
             It imports the LEMS definitions of the core NeuroML 2 Components,
             imports in "pure" NeuroML 2 and contains some LEMS elements for running
             a simulation -->

        <Target component="sim1"/>

        <Include file="NeuroML2CoreTypes/NeuroMLCoreDimensions.xml"/>
        <Include file="NeuroML2CoreTypes/Cells.xml"/>
        <Include file="NeuroML2CoreTypes/Networks.xml"/>
        <Include file="NeuroML2CoreTypes/Simulation.xml"/>

        <ionChannel id="passive" type="ionChannelPassive" conductance="10pS">
           <notes>Leak conductance</notes>
        </ionChannel>

        <ionChannel id="na" type="ionChannelHH" conductance="10pS" species="na">
           <notes>Na channel</notes>

           <gateHHrates id="m" instances="3">
                <forwardRate type="HHExpLinearRate" rate="1per_ms" midpoint="-40mV" scale="10mV"/>
                <reverseRate type="HHExpRate" rate="4per_ms" midpoint="-65mV" scale="-18mV"/>
           </gateHHrates>

           <gateHHrates id="h" instances="1">
               <forwardRate type="HHExpRate" rate="0.07per_ms" midpoint="-65mV" scale="-20mV"/>
               <reverseRate type="HHSigmoidRate" rate="1per_ms" midpoint="-35mV" scale="10mV"/>
           </gateHHrates>

        </ionChannel>

        <ionChannel id="k" type="ionChannelHH" conductance="10pS" species="k">

            <gateHHrates id="n" instances="4">
                <forwardRate type="HHExpLinearRate" rate="0.1per_ms" midpoint="-55mV" scale="10mV"/>
                <reverseRate type="HHExpRate" rate="0.125per_ms" midpoint="-65mV" scale="-80mV"/>
            </gateHHrates>

        </ionChannel>

        <cell id="hhcell">

            <morphology id="morph1">
                <segment id="0" name="soma">
                        <proximal x="0" y="0" z="0" diameter="17.841242"/> <!--Gives a convenient surface area of 1000.0 ?m�-->
                        <distal x="0" y="0" z="0" diameter="17.841242"/>
                </segment>

                <segmentGroup id="soma_group">
                    <member segment="0"/>
                </segmentGroup>

            </morphology>

            <biophysicalProperties id="bioPhys1">

                <membraneProperties>

                    <channelDensity id="leak" ionChannel="passive" condDensity="3.0 S_per_m2" erev="-54.3mV"/>
                    <channelDensity id="naChans" ionChannel="na" condDensity="120.0 mS_per_cm2" erev="50.0 mV"/>
                    <channelDensity id="kChans" ionChannel="k" condDensity="360 S_per_m2" erev="-77mV"/>

                    <spikeThresh value="-20mV"/>
                    <specificCapacitance value="1.0 uF_per_cm2"/>
                    <initMembPotential value="-65mV"/>

                </membraneProperties>

                <intracellularProperties>
                    <resistivity value="0.03 kohm_cm"/>   <!-- Note: not used in single compartment simulations -->
                </intracellularProperties>

            </biophysicalProperties>

        </cell>

        <pulseGenerator id="pulseGen1" delay="100ms" duration="100ms" amplitude="0.08nA"/>

        <network id="net1">
            <population id="hhpop" component="hhcell" size="1"/>
            <explicitInput target="hhpop[0]" input="pulseGen1"/>
        </network>

    <SimulationSet id="sim1">
        <Display id="disp1" title="Ex5: HH cell with simple morphology: voltage" xmin="0" xmax="300" ymin="-75" ymax="-50"/>

        <Simulation id="sim1" length="300ms" step="0.01ms" target="net1" display="disp1">

            <DisplayList timeScale="1ms" title="Ex5: HH cell with simple morphology: voltage">

                <Line id ="iaf1" quantity="hhpop[0]/v" scale="1mV"  color="#000000"  timeScale="1ms" save="examples/testResults/iaf_tau_v.dat"/>
            </DisplayList>

        </Simulation>
    </SimulationSet>
        <!--
        <Simulation id="sim1" length="300ms" step="0.01ms" target="net1">
                <Display id="d1" title="Ex5: HH cell with simple morphology: voltage" timeScale="1ms">
                        <Line id="l1" quantity="hhpop[0]/v" scale="1mV" color="#ffffff" save="examples/testResults/mml_v.dat"/>
                        <Line id="l2" quantity="hhpop[0]/spiking" scale="0.1V"  color="#004040"/>
                        <Line id="l3" quantity="hhpop[0]/debugVal" scale="1V"  color="#999999" save="examples/testResults/debug.dat"/>
                </Display>
                <Display id="d2" title="Ex5: HH cell with simple morphology: rate variables" timeScale="1ms">
                        <Line id="m" quantity="hhpop[0]/bioPhys1/membraneProperties/naChans/na/m/q" scale="1"  color="#000000" save="examples/testResults/hh_m.dat"/>
                        <Line id="h" quantity="hhpop[0]/bioPhys1/membraneProperties/naChans/na/h/q" scale="1"  color="#ff0000" save="examples/testResults/hh_h.dat"/>
                        <Line id="n" quantity="hhpop[0]/bioPhys1/membraneProperties/kChans/k/n/q" scale="1"  color="#0000ff" save="examples/testResults/hh_n.dat"/>
                </Display>
                <Display id="d3" title="Ex5: HH cell with simple morphology: current densities" timeScale="1ms">
                        <Line id="ina" quantity="hhpop[0]/bioPhys1/membraneProperties/naChans/iDensity" scale="1"  color="#000000" save="examples/testResults/i_na.dat"/>
                        <Line id="ik" quantity="hhpop[0]/bioPhys1/membraneProperties/kChans/iDensity" scale="1"  color="#ff0000" save="examples/testResults/i_k.dat"/>
                </Display>
                <Display id="d3" title="Ex5: HH cell with simple morphology: conductance densities" timeScale="1ms">
                        <Line id="gna" quantity="hhpop[0]/bioPhys1/membraneProperties/naChans/gDensity" scale="1"  color="#000000" save="examples/testResults/g_na.dat"/>
                        <Line id="gk" quantity="hhpop[0]/bioPhys1/membraneProperties/kChans/gDensity" scale="1"  color="#ff0000" save="examples/testResults/g_k.dat"/>
                </Display>
        </Simulation>-->

</Lems>
